import Sofa
from FingerController import FingerController
import numpy as np
import matplotlib.pyplot as plt

def createScene(rootNode):
    rootNode.dt = 0.01
    rootNode.addObject('DefaultVisualManagerLoop')
    rootNode.addObject('DefaultAnimationLoop')
    rootNode.addObject('VisualStyle', displayFlags='showForceFields showBehaviorModels')
    rootNode.addObject('RequiredPlugin',
                       pluginName='SoftRobots SofaPython3 SoftRobots.Inverse SofaConstraint SofaDeformable SofaEngine SofaImplicitOdeSolver SofaLoader SofaOpenglVisual SofaSimpleFem SofaSparseSolver')
    rootNode.gravity.value = [-9810, 0, 0]
    rootNode.addObject('AttachBodyButtonSetting', stiffness=10)
    rootNode.addObject('FreeMotionAnimationLoop')
    rootNode.addObject('GenericConstraintSolver', tolerance=1e-12, maxIterations=10000)
    rootNode.addObject('OglSceneFrame', style="Arrows", alignment="TopRight")

    finger = rootNode.addChild('finger')
    finger.addObject('EulerImplicitSolver', name='odesolver', rayleighStiffness=0.1, rayleighMass=0.1)
    finger.addObject('SparseLDLSolver', name='directSolver')
    finger.addObject('MeshVTKLoader', name='loader', filename='data/mesh/pneunetCutCoarse.vtk')
    finger.addObject('MeshTopology', src='@loader', name='container')
    finger.addObject('MechanicalObject', name='tetras', template='Vec3', showObject=True, showObjectScale=1)
    finger.addObject('TetrahedronFEMForceField', template='Vec3', name='FEM', method='large', poissonRatio=0.3,
                     youngModulus=500)
    finger.addObject('UniformMass', totalMass=0.0008)
    finger.addObject('BoxROI', name='boxROISubTopo', box=[-100, 22.5, -8, -19, 28, 8], strict=False)
    finger.addObject('BoxROI', name='boxROI', box=[-10, 0, -20, 0, 30, 20], drawBoxes=True)
    finger.addObject('RestShapeSpringsForceField', points='@boxROI.indices', stiffness=1e12, angularStiffness=1e12)
    finger.addObject('LinearSolverConstraintCorrection')

    modelSubTopo = finger.addChild('modelSubTopo')
    modelSubTopo.addObject('MeshTopology', position='@loader.position', tetrahedra='@boxROISubTopo.tetrahedraInROI',
                           name='container')
    modelSubTopo.addObject('TetrahedronFEMForceField', template='Vec3', name='FEM', method='large', poissonRatio=0.3,
                           youngModulus=1500)

    cavity = finger.addChild('cavity')
    cavity.addObject('MeshSTLLoader', name='cavityLoader', filename='data/mesh/pneunetCavityCut.stl')
    cavity.addObject('MeshTopology', src='@cavityLoader', name='cavityMesh')
    cavity.addObject('MechanicalObject', name='cavity')
    cavity.addObject('SurfacePressureConstraint', name='SurfacePressureConstraint', template='Vec3', value=1,
                     triangles='@cavityMesh.triangles', valueType='pressure')
    cavity.addObject('BarycentricMapping', name='mapping', mapForces=False, mapMasses=False)

    rootNode.addObject(FingerController(rootNode))
    rootNode.addObject(FingerController(name="MyFingerController"))


# def createScene(rootNode):
#     rootNode.addObject('VisualStyle', displayFlags='showForceFields showBehaviorModels')
#     rootNode.addObject('RequiredPlugin',
#                        pluginName='SoftRobots SofaPython3')
#     rootNode.gravity.value = [-9810, 0, 0]
#     rootNode.addObject('AttachBodyButtonSetting', stiffness=10)
#     rootNode.addObject('FreeMotionAnimationLoop')
#     rootNode.addObject('GenericConstraintSolver', tolerance=1e-12, maxIterations=10000)

#     finger = rootNode.addChild('finger')
#     finger.addObject('EulerImplicitSolver', name='odesolver', rayleighStiffness=0.1, rayleighMass=0.1)
#     finger.addObject('SparseLDLSolver', name='directSolver')
#     finger.addObject('MeshVTKLoader', name='loader', filename='data/mesh/pneunetCutCoarse.vtk')
#     finger.addObject('MeshTopology', src='@loader', name='container')
#     finger.addObject('MechanicalObject', name='tetras', template='Vec3', showObject=True, showObjectScale=1)
#     finger.addObject('TetrahedronFEMForceField', template='Vec3', name='FEM', method='large', poissonRatio=0.3,
#                      youngModulus=500)
#     finger.addObject('UniformMass', totalMass=0.0008)
#     finger.addObject('BoxROI', name='boxROISubTopo', box=[-100, 22.5, -8, -19, 28, 8], strict=False)
#     finger.addObject('BoxROI', name='boxROI', box=[-10, 0, -20, 0, 30, 20], drawBoxes=True)
#     finger.addObject('RestShapeSpringsForceField', points='@boxROI.indices', stiffness=1e12, angularStiffness=1e12)
#     finger.addObject('LinearSolverConstraintCorrection')

#     modelSubTopo = finger.addChild('modelSubTopo')
#     modelSubTopo.addObject('MeshTopology', position='@loader.position', tetrahedra='@boxROISubTopo.tetrahedraInROI',
#                            name='container')
#     modelSubTopo.addObject('TetrahedronFEMForceField', template='Vec3', name='FEM', method='large', poissonRatio=0.3,
#                            youngModulus=1500)

#     cavity = finger.addChild('cavity')
#     cavity.addObject('MeshSTLLoader', name='cavityLoader', filename='data/mesh/pneunetCavityCut.stl')
#     cavity.addObject('MeshTopology', src='@cavityLoader', name='cavityMesh')
#     cavity.addObject('MechanicalObject', name='cavity')
#     cavity.addObject('SurfacePressureConstraint', name='SurfacePressureConstraint', template='Vec3', value=1,
#                      triangles='@cavityMesh.triangles', valueType='pressure')
#     cavity.addObject('BarycentricMapping', name='mapping', mapForces=False, mapMasses=False)

#     rootNode.addObject(FingerController(rootNode))
